# Лабораторная работа 5 "Среднеквадратичные приближения".
# Гордеев Никита, группа 22307, вариант 7
# ДАНО:
# Таблично заданная функция на промежутке
x := [0.25; 0.31; 0.36; 0.39; 0.43; 0.47; 0.52; 0.56; 0.64; 0.66; 0.71]
y := [0.255; 0.320; 0.376; 0.411; 0.458; 0.508; 0.572; 0.626; 0.584; 0.576; 0.559]
n := 10
# ЭТАП 1: РЕАЛИЗАЦИЯ МЕТОДА НАИМЕНЬШИХ КВАДРАТОВ
s(j) := sum(x[i]^j, i = 0 .. n)  # Определение функции s(j) - суммы степеней x от 0 до n включительно.
b(j) := sum(y[i]*x[i]^j, i = 0 .. n)  # Определение функции b(j) - суммы произведений y и степеней x от 0 до n включительно
A2 := [s(0), s(1), s(2); s(1), s(2), s(3); s(2), s(3), s(4)]  # Создание матрицы A2 размером 3x3, используя функцию s(j) для заполнения элементов
B2 := [b(0); b(1); b(2)]  # Создание матрицы B2 размером 3x1, используя функцию b(j) для заполнения элементов
# Вектор коэффициентов многочлена, который аппроксимирует заданные данные, вычисление системы линейных уравнений A2 * a2 = B2
a2 := lsolve(A2, B2) = [-0.376511; 2.98611; -2.31697]
p2(t) := sum(a2[k]*t^k, k = 0 .. 2)  # Аппроксимирующий многочлен p2(t) - суммы произведений коэффициентов a2 и степеней t от 0 до 2 включительно
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A3 := [s(0), s(1), s(2), s(3); s(1), s(2), s(3), s(4); s(2), s(3), s(4), s(5); s(3), s(4), s(5), s(6)]
B3 := [b(0); b(1); b(2); b(3)]
a3 := lsolve(A3, B3) = [0.423818; -2.69486; 10.2887; -8.81024]
p3(t) := sum(a3[k]*t^k, k = 0 .. 3)
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A4 := [
    s(0), s(1), s(2), s(3), s(4);
    s(1), s(2), s(3), s(4), s(5);
    s(2), s(3), s(4), s(5), s(6);
    s(3), s(4), s(5), s(6), s(7);
    s(4), s(5), s(6), s(7), s(8)
]
B4 := [b(0); b(1); b(2); b(3); b(4)]
a4 := lsolve(A4, B4) = [1.13428; -9.46418; 33.3231; -42.1441; 17.3977]
p4(t) := sum(a4[k]*t^k, k = 0 .. 4)
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# Абсолютная погрешность
i := 0 .. n
ar2[i] := |y[i] - p2(x[i])|
# Вычисление абсолютной погрешности для каждой точки
max(ar2) = 0.0568887  # Нахождение максимальной абсолютной погрешности
ar3[i] := |y[i] - p3(x[i])|
max(ar3) = 0.0319782
ar4[i] := |y[i] - p4(x[i])|
max(ar4) = 0.0317281
# Среднеквадратичная погрешность
sr2 := 1/(n + 1)*sqrt(sum(ar2[i]^2, i)) = 0.00739716
sr3 := 1/(n + 1)*sqrt(sum(ar3[i]^2, i)) = 0.00425675
sr4 := 1/(n + 1)*sqrt(sum(ar4[i]^2, i)) = 0.00399855
# [plot: y, p2(t), p3(t), p4(t) vs x, t]
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# ЭТАП 2: ИСПОЛЬЗОВАНИЕ ФУНКЦИЙ MATHCAD REGRESS И INTERP
# Строим многочлены различных степеней (m=4, 5, 6, 7, 8)
a4 := regress(x, y, 4)  # аппроакимация: вычисления коэффициентов многочлена по методу наименьших квадратов
p4(t) := interp(a4, x, y, t)  # интерполяции данных с использованием полученных коэффициентов многочлена
a5 := regress(x, y, 5)
p5(t) := interp(a5, x, y, t)
a6 := regress(x, y, 6)
p6(t) := interp(a6, x, y, t)
a7 := regress(x, y, 7)
p7(t) := interp(a7, x, y, t)
a8 := regress(x, y, 8)
p8(t) := interp(a8, x, y, t)
# графики исходной функции и полученных многочленов
# [plot: y, p4(t), p6(t), p8(t) vs x, t]
# ЭТАП 3: СРАВНЕНИЕ И АНАЛИЗ РЕЗУЛЬТАТОВ
# Абсолютная погрешность
i := 0 .. n
ar4[i] := |y[i] - p4(x[i])|
# Вычисление абсолютной погрешности для каждой точки
max(ar4) = 0.0317281  # Нахождение максимальной абсолютной погрешности
ar5[i] := |y[i] - p5(x[i])|
max(ar5) = 0.0164788
ar6[i] := |y[i] - p6(x[i])|
max(ar6) = 0.00897022
ar7[i] := |y[i] - p7(x[i])|
max(ar7) = 0.00807826
ar8[i] := |y[i] - p8(x[i])|
max(ar8) = 0.00548211
# Среднеквадратичная погрешность
sr4 := 1/(n + 1)*sqrt(sum(ar4[i]^2, i)) = 0.00399855
sr5 := 1/(n + 1)*sqrt(sum(ar5[i]^2, i)) = 0.00224437
sr6 := 1/(n + 1)*sqrt(sum(ar6[i]^2, i)) = 0.00140961
sr7 := 1/(n + 1)*sqrt(sum(ar7[i]^2, i)) = 0.00139649
sr8 := 1/(n + 1)*sqrt(sum(ar8[i]^2, i)) = 0.000804263
